<?xml version="1.0"?>

<propeller name="EX2400 blade-derived 10-inch two-blade propeller">
  <ixx> 0.001 </ixx>
  <diameter unit="IN"> 10.0000 </diameter>
  <numblades> 2 </numblades>
  <gearratio>  0.62 </gearratio>
  <p_factor>   1.26 </p_factor>

  <!-- Source: ex2400_blade.rotor.1 final timestep. J=0.32212, RPM=11000.028, CT=0.06550, CP=0.03432. Only one blade operating point was available, so CT/CP are repeated across J rather than inventing a prop map. -->

  <table name="C_THRUST" type="internal">
    <tableData>

      0.00000   0.06550
      0.10000   0.06550
      0.20000   0.06550
      0.30000   0.06550
      0.32212   0.06550
      0.40000   0.06550
      0.50000   0.06550
      0.60000   0.06550
      0.80000   0.06550
      1.00000   0.06550
      1.20000   0.06550
      1.40000   0.06550
      1.60000   0.06550

    </tableData>
  </table>

  <table name="C_POWER" type="internal">
    <tableData>

      0.00000   0.03432
      0.10000   0.03432
      0.20000   0.03432
      0.30000   0.03432
      0.32212   0.03432
      0.40000   0.03432
      0.50000   0.03432
      0.60000   0.03432
      0.80000   0.03432
      1.00000   0.03432
      1.20000   0.03432
      1.40000   0.03432
      1.60000   0.03432

    </tableData>
  </table>

  <table name="CT_MACH" type="internal">
    <tableData>

      0.0    1.0
      0.85   1.0
      1.05   0.8

    </tableData>
  </table>

  <table name="CP_MACH" type="internal">
    <tableData>

      0.0    1.0
      0.85   1.0
      1.05   1.8
      2.00   1.4

    </tableData>
  </table>

</propeller>
